// SBML level 3 version 1

model fullEGFR9__sorafenib()
  // fullEGFR9_+sorafenib
  // model units - substance: molecules, time: min, volume: um3, area: um2, length: um, extent: molecules

  // Compartments:
  compartment cytoplasm = 1 um3;
  compartment pm = 1;  // 2-D

  // Species:
  species $sorafenib in cytoplasm = init_sorafenib;
  species Ras_GTP in pm = 0;
  species Raf1 in cytoplasm = init_RAF_HeLa;
  species pRaf1 in cytoplasm = 0;
  species Ras_Raf1 in pm = 0;
  species Ras_iRaf1 in pm = 0;
  species Ras_pRaf1_Raf1_tetramer in pm = 0;
  species Ras_BRaf in pm = 0;
  species Ras_pRaf1 in pm = 0;
  species Ras_BRaf_Raf1_tetramer in pm = 0;
  species Ras_iRaf1_tetramer in pm = 0;
  species iRaf1 in cytoplasm = 0;
  species BRaf in cytoplasm = init_BRAF_HeLa;
  species Ras_Braf_iRaf1_tetramer in pm = 0;
  species Ras_pRaf1_tetramer in pm = 0;
  species Ras_BRaf_pRaf1_tetramer in pm = 0;
  species MEK in cytoplasm = init_MEK_HeLa;
  species pMEK in cytoplasm = 0;
  species ERK in cytoplasm = init_ERK_HeLa;
  species iBRaf in cytoplasm = 0;
  species Ras_Raf1_iBRaf_tetramer in pm = 0;
  species Ras_pRaf1_iBRaf_tetramer in pm = 0;
  species pERK in cytoplasm = 0;
  species iBRaf_dimer in pm = 0;
  species BRaf_dimer in pm = 0;
  species Ras_iBRaf in pm = 0;
  species Ras_nfpRaf1 in pm = 0;
  species nfpRaf1 in cytoplasm = 0;
  species Ras_nfpBRaf in pm = 0;
  species nfpBRaf in cytoplasm = 0;
  species BRaf_iBRaf_dimer in pm = 0;
  species Ras_nfpiBRaf in pm = 0;
  species nfpiBRaf in cytoplasm = 0;
  species Ras_nfpiRaf1 in pm = 0;
  species nfpiRaf1 in cytoplasm = 0;
  species Ras_iRaf1_iBRaf1_tetramer in pm = 0;
  species mE in pm = init_EGFR_HeLa;
  species mEL in pm = 0;
  species mELmEL in pm = 0;
  // EGF-bound pEGFR dimer
  species E in pm = 0;
  species EG2SOS in pm = 0;
  species GRB2_SOS in cytoplasm = 0;
  species Ras_GDP in pm = init_RAS_HeLa;
  species EG2 in pm = 0;
  species GRB2 in cytoplasm = init_GRB2_HeLa;
  species SOS in cytoplasm = init_SOS_HeLa;
  species nfpSOS in cytoplasm = 0;

  // Parameters:
  kSon = 13.52143 uM_1_min_1;
  kSoff = 1243.069 min_1;
  kpR1 = 190 min_1;
  kdR1f = 0.019 molecules_1_min_1;
  kR1f = 2.5e-5 molecules_1_min_1;
  kR1r = 8.4 min_1;
  kBf = 2.5e-7 min_1_molecules_1;
  kBr = 0.037 min_1;
  kdR1r = 110 min_1;
  kdpR1 = 0.6 min_1;
  kiR1f = 1.15e-5 min_1_molecules_1;
  kiR1r = 0.072015388 min_1;
  kpMEK = 6e-6 molecules_1_min_1;
  kpERK = 6e-5 min_1;
  kdpERK = 0.6 min_1;
  kdpMEK = 0.6 min_1;
  kiBf = 2.47e-7 molecules_1_min_1;
  kiBr = 0.0367 min_1;
  kfpR1r = 0.046229858 min_1;
  kfpBr = 0.37 min_1;
  knfpBR1 = 6e-7 min_1_molecules_1;
  kEf = 310 uM_1_min_1;
  EGF = 0.0017 uM;
  kEr = 0.8 min_1;
  kdEf = 0.00092 molecules_1_min_1;
  kdEr = 0.1 min_1;
  kcatE = 6.60624874 min_1;
  kdp = 8 min_1;
  kRgneslow = 5.838227 min_1;
  Kmgneslow = 141781.7 molecules;
  kRhydro = 0.142907544 min_1;
  kG2f = 0.00038 molecules_1_min_1;
  kG2r = 460 min_1;
  kSOSf = 2.2e-6 min_1_molecules_1;
  kSOSr = 0.0083 min_1;
  kdpSOS = 0.6 min_1;
  knfpSOS = 0.0025 min_1;
  init_ERK_HeLa = 600000 molecules;
  init_SOS_HeLa = 7700 molecules;
  init_RAS_HeLa = 135000 molecules;
  init_MEK_HeLa = 500000 molecules;
  init_GRB2_HeLa = 628000 molecules;
  init_EGFR_HeLa = 93000 molecules;
  init_BRAF_HeLa = 1000 molecules;
  kG2SOSf = 0.00942 molecules_1_min_1;
  kG2SOSr = 4.6 min_1;
  init_sorafenib = 10 uM;
  init_RAF_HeLa = 12000 molecules;
  knfpiR1r = 0.046229858 min_1_molecules_1;
  knfpiBr = 0.37 min_1_molecules_1;
  _T_ = 300 K;
  _PI_ = 3.141593 _one_;
  _F_ = 9.64853321e4 C_mol_1;
  _F_nmol_ = 9.64853321e-5 C_nmol_1;
  _N_pmol_ = 6.02214179e11 molecules_pmol_1;
  _K_GHK_ = 1e-9 _one_000000000;
  _R_ = 8314.463 mV_C_K_1_mol_1;
  K_millivolts_per_volt = 1000 mV_V_1;
  KMOLE = 0.001660539 uM_um3_molecules_1;
  Kf_Ras_Raf1_bind has um3_min_1_molecules_1;
  Kr_Ras_Raf1_bind has min_1;
  Kf_BRAF_RAF1_bind has um2_min_1_molecules_1;
  Kr_BRAF_RAF1_bind has min_1;
  Kr_BRAF_RAF1_phos = 0 min_1;
  Kf_BRAF_RAF1_phos has min_1;
  Kf_RAS_pRAF1_unbind has min_1;
  Kr_RAS_pRAF1_unbind has um3_min_1_molecules_1;
  Kf_RAS_BRAF_bind has um3_min_1_molecules_1;
  Kr_RAS_BRAF_bind has min_1;
  Kf_pRaf1_Raf1_bind has um2_min_1_molecules_1;
  Kr_pRaf1_Raf1_bind has min_1;
  Kr_pRAF1_RAF1_phos = 0 min_1;
  Kf_pRAF1_RAF1_phos has min_1;
  Kf_sorafenib_Raf1_bind_cyt has um3_min_1_molecules_1;
  Kr_sorafenib_Raf1_bind_cyt has min_1;
  Kf_Ras_iRaf1_bind has um3_min_1_molecules_1;
  Kr_Ras_iRaf1_bind has min_1;
  Kf_iRaf1_iRaf1_bind has um2_min_1_molecules_1;
  Kr_iRaf1_iRaf1_bind has min_1;
  Kf_BRaf_iRaf1_bind has um2_min_1_molecules_1;
  Kr_BRaf_iRaf1_bind has min_1;
  Kr_pRAF1_dephos = 0 min_1;
  Kf_pRAF1_dephos has min_1;
  Kf_pRaf1_pRaf1_unbind has min_1;
  Kr_pRaf1_pRaf1_unbind has um2_min_1_molecules_1;
  Kf_BRaf_pRaf1_unbind has min_1;
  Kr_BRaf_pRaf1_unbind has um2_min_1_molecules_1;
  Kf_sorafenib_BRaf_bind_cyt has um3_min_1_molecules_1;
  Kr_sorafenib_BRaf_bind_cyt has min_1;
  Kr_MEK_phos = 0 min_1;
  Kf_MEK_phos has min_1;
  Kr_MEK_dephos = 0 min_1;
  Kf_MEK_dephos has min_1;
  Kr_ERK_phos = 0 min_1;
  Kf_ERK_phos has min_1;
  Kr_ERK_dephos = 0 min_1;
  Kf_ERK_dephos has min_1;
  Kf_RAS_iBRAF_bind has um3_min_1_molecules_1;
  Kr_RAS_iBRAF_bind has min_1;
  Kf_iBRaf_dim has um2_min_1_molecules_1;
  Kr_iBRaf_dim has min_1;
  Kf_iBRaf_Raf1_bind has um2_min_1_molecules_1;
  Kr_iBRaf_Raf1_bind has min_1;
  Kr_Raf1_iBRaf_phos = 0 min_1;
  Kf_Raf1_iBRaf_phos has min_1;
  Kf_pRaf1_iBRaf_unbind has min_1;
  Kr_pRaf1_iBRaf_unbind has um2_min_1_molecules_1;
  Kf_BRAF_dim has um2_min_1_molecules_1;
  Kr_BRAF_dim has min_1;
  Kr_Ras_pRaf1_dp = 0 min_1;
  Kf_Ras_pRaf1_dp has min_1;
  Kr_Ras_Raf1_nfp = 0 min_1;
  Kf_Ras_Raf1_nfp has min_1;
  Kr_neg_fdbk_unbind_RASt_nfpRAF1 = 0 um3_min_1_molecules_1;
  Kf_neg_fdbk_unbind_RASt_nfpRAF1 has min_1;
  Kr_neg_fdbk_dephos_pRaf1 = 0 min_1;
  Kf_neg_fdbk_dephos_pRaf1 has min_1;
  Kr_BRAF_nfp = 0 min_1;
  Kf_BRAF_nfp has min_1;
  Kr_neg_fdbk_unbind_RASt_nfpBRAF = 0 um3_min_1_molecules_1;
  Kf_neg_fdbk_unbind_RASt_nfpBRAF has min_1;
  Kr_neg_fdbk_dephos_pBRAF = 0 min_1;
  Kf_neg_fdbk_dephos_pBRAF has min_1;
  Kf_BRaf_iBRaf_dim has um2_min_1_molecules_1;
  Kr_BRaf_iBRaf_dim has min_1;
  Kr_Ras_iRaf_nfp = 0 min_1;
  Kf_Ras_iRaf_nfp has min_1;
  Kr_neg_fdbk_unbind_piRaf1_RASt = 0 um3_min_1_molecules_1;
  Kf_neg_fdbk_unbind_piRaf1_RASt has min_1;
  Kr_neg_fdbck_dephos_piRaf = 0 min_1;
  Kf_neg_fdbck_dephos_piRaf has min_1;
  Kr_Ras_iBRaf_nfp = 0 min_1;
  Kf_Ras_iBRaf_nfp has min_1;
  Kr_neg_fdbk_unbind_piBRaf_RASt = 0 um3_min_1_molecules_1;
  Kf_neg_fdbk_unbind_piBRaf_RASt has min_1;
  Kr_neg_fdbk_dephos_iBRAF = 0 min_1;
  Kf_neg_fdbk_dephos_iBRAF has min_1;
  Kf_iRaf_iBRaf_dim has um2_min_1_molecules_1;
  Kr_iRaf_iBRaf_dim has min_1;
  Kf_EGF_bind has min_1;
  Kr_EGF_bind has min_1;
  Kf_mEL_dim has um2_min_1_molecules_1;
  Kr_mEL_dim has min_1;
  Kf_mELmEL_phos_dephos has min_1;
  Kr_mELmEL_phos_dephos has min_1;
  Kr_RAS_GTP_bind = 0 min_1;
  Kf_RAS_GTP_bind has min_1;
  Kr_RAS_GTPhydro = 0 min_1;
  Kf_RAS_GTPhydro has min_1;
  Kf_E_G2SOS_bind has um3_min_1_molecules_1;
  Kr_E_G2SOS_bind has min_1;
  Kf_E_G2_bind has um3_min_1_molecules_1;
  Kr_E_G2_bind has min_1;
  Kf_GRB2_SOS_bind_cyt has um3_min_1_molecules_1;
  Kr_GRB2_SOS_bind_cyt has min_1;
  Kf_EG2_SOS_bind has um3_min_1_molecules_1;
  Kr_EG2_SOS_bind has min_1;
  Kr_neg_fdbk_dephos_pSOS = 0 min_1;
  Kf_neg_fdbk_dephos_pSOS has min_1;
  Kr_neg_fdbk_phos_of_SOS = 0 um3_min_1_molecules_1;
  Kf_neg_fdbk_phos_of_SOS has min_1;

  // Assignment rules:
  Raf1_pm_param := Ras_pRaf1 + 2*Ras_pRaf1_Raf1_tetramer + Ras_BRaf_Raf1_tetramer + Ras_iRaf1 + Ras_Raf1 + 2*Ras_iRaf1_tetramer + Ras_Braf_iRaf1_tetramer + Ras_BRaf_pRaf1_tetramer + 2*Ras_pRaf1_tetramer + Ras_nfpiRaf1 + Ras_nfpRaf1 + Ras_iRaf1_iBRaf1_tetramer + Ras_Raf1_iBRaf_tetramer + Ras_pRaf1_iBRaf_tetramer;
  Raf1_cyt_param := Raf1 + pRaf1 + iRaf1 + nfpRaf1 + nfpiRaf1;
  boundRaf_frac_parameter := Raf1_pm_param*(1/(Raf1_cyt_param + Raf1_pm_param));
  active_Raf := 2*BRaf_dimer + Ras_BRaf_Raf1_tetramer + 2*Ras_BRaf_pRaf1_tetramer + Ras_pRaf1_iBRaf_tetramer + Ras_pRaf1 + Ras_pRaf1_Raf1_tetramer + 2*Ras_pRaf1_tetramer + pRaf1 + BRaf_iBRaf_dimer + Ras_Braf_iRaf1_tetramer;
  RasGTP_parameter := Ras_GTP + 2*(Ras_iRaf1_tetramer + Ras_Braf_iRaf1_tetramer + Ras_BRaf_Raf1_tetramer + Ras_pRaf1_Raf1_tetramer + Ras_BRaf_pRaf1_tetramer + Ras_pRaf1_tetramer + BRaf_dimer + BRaf_iBRaf_dimer + iBRaf_dimer + Ras_iRaf1_iBRaf1_tetramer + Ras_Raf1_iBRaf_tetramer + Ras_pRaf1_iBRaf_tetramer) + Ras_BRaf + Ras_iRaf1 + Ras_pRaf1 + Ras_Raf1 + Ras_nfpRaf1 + Ras_nfpiRaf1 + Ras_iBRaf + Ras_nfpiBRaf + Ras_nfpBRaf;
  pRaf1_total := Ras_pRaf1 + Ras_pRaf1_iBRaf_tetramer + Ras_pRaf1_tetramer + Ras_BRaf_pRaf1_tetramer + pRaf1 + Ras_pRaf1_Raf1_tetramer;
  Kf_Ras_Raf1_bind := kR1f;
  Kr_Ras_Raf1_bind := kR1r;
  Kf_BRAF_RAF1_bind := kdR1f;
  Kr_BRAF_RAF1_bind := kdR1r;
  Kf_BRAF_RAF1_phos := kpR1;
  Kf_RAS_pRAF1_unbind := kR1r;
  Kr_RAS_pRAF1_unbind := kR1f;
  Kf_RAS_BRAF_bind := kBf;
  Kr_RAS_BRAF_bind := kBr;
  Kf_pRaf1_Raf1_bind := kdR1f;
  Kr_pRaf1_Raf1_bind := kdR1r;
  Kf_pRAF1_RAF1_phos := kpR1;
  Kf_sorafenib_Raf1_bind_cyt := kSon;
  Kr_sorafenib_Raf1_bind_cyt := kSoff;
  Kf_Ras_iRaf1_bind := kiR1f;
  Kr_Ras_iRaf1_bind := kiR1r;
  Kf_iRaf1_iRaf1_bind := kdR1f;
  Kr_iRaf1_iRaf1_bind := kdR1r;
  Kf_BRaf_iRaf1_bind := kdR1f;
  Kr_BRaf_iRaf1_bind := kdR1r;
  Kf_pRAF1_dephos := kdpR1;
  Kf_pRaf1_pRaf1_unbind := kdR1r;
  Kr_pRaf1_pRaf1_unbind := kdR1f;
  Kf_BRaf_pRaf1_unbind := kdR1r;
  Kr_BRaf_pRaf1_unbind := kdR1f;
  Kf_sorafenib_BRaf_bind_cyt := kSon;
  Kr_sorafenib_BRaf_bind_cyt := kSoff;
  Kf_MEK_phos := kpMEK*active_Raf;
  Kf_MEK_dephos := kdpMEK;
  Kf_ERK_phos := kpERK*pMEK;
  Kf_ERK_dephos := kdpERK;
  Kf_RAS_iBRAF_bind := kiBf;
  Kr_RAS_iBRAF_bind := kiBr;
  Kf_iBRaf_dim := kdR1f;
  Kr_iBRaf_dim := kdR1r;
  Kf_iBRaf_Raf1_bind := kdR1f;
  Kr_iBRaf_Raf1_bind := kdR1r;
  Kf_Raf1_iBRaf_phos := kpR1;
  Kf_pRaf1_iBRaf_unbind := kdR1r;
  Kr_pRaf1_iBRaf_unbind := kdR1f;
  Kf_BRAF_dim := kdR1f;
  Kr_BRAF_dim := kdR1r;
  Kf_Ras_pRaf1_dp := kdpR1;
  Kf_Ras_Raf1_nfp := knfpBR1*pERK;
  Kf_neg_fdbk_unbind_RASt_nfpRAF1 := kfpR1r;
  Kf_neg_fdbk_dephos_pRaf1 := kdpR1;
  Kf_BRAF_nfp := knfpBR1*pERK;
  Kf_neg_fdbk_unbind_RASt_nfpBRAF := kfpBr;
  Kf_neg_fdbk_dephos_pBRAF := kdpR1;
  Kf_BRaf_iBRaf_dim := kdR1f;
  Kr_BRaf_iBRaf_dim := kdR1r;
  Kf_Ras_iRaf_nfp := kpR1*pERK;
  Kf_neg_fdbk_unbind_piRaf1_RASt := knfpiR1r;
  Kf_neg_fdbck_dephos_piRaf := kdpR1;
  Kf_Ras_iBRaf_nfp := knfpBR1*pERK;
  Kf_neg_fdbk_unbind_piBRaf_RASt := knfpiBr;
  Kf_neg_fdbk_dephos_iBRAF := kdpR1;
  Kf_iRaf_iBRaf_dim := kdR1f;
  Kr_iRaf_iBRaf_dim := kdR1r;
  Kf_EGF_bind := kEf*EGF;
  Kr_EGF_bind := kEr;
  Kf_mEL_dim := kdEf;
  Kr_mEL_dim := kdEr;
  Kf_mELmEL_phos_dephos := kcatE;
  Kr_mELmEL_phos_dephos := kdp;
  Kf_RAS_GTP_bind := kRgneslow*EG2SOS*(1/(Kmgneslow + Ras_GDP));
  Kf_RAS_GTPhydro := kRhydro;
  Kf_E_G2SOS_bind := kG2SOSf;
  Kr_E_G2SOS_bind := kG2SOSr;
  Kf_E_G2_bind := kG2f;
  Kr_E_G2_bind := kG2r;
  Kf_GRB2_SOS_bind_cyt := kSOSf;
  Kr_GRB2_SOS_bind_cyt := kSOSr;
  Kf_EG2_SOS_bind := kSOSf;
  Kr_EG2_SOS_bind := kSOSr;
  Kf_neg_fdbk_dephos_pSOS := kdpSOS;
  Kf_neg_fdbk_phos_of_SOS := knfpSOS*pERK;

  // Reactions:
  Ras_Raf1_bind: Ras_GTP + Raf1 -> Ras_Raf1; (Kf_Ras_Raf1_bind*Ras_GTP*Raf1 + (-(Kr_Ras_Raf1_bind*Ras_Raf1)))*pm;
    Ras_Raf1_bind_I = 0 pA_um_2; Ras_Raf1_bind_netValence = 1 _one_;
  BRAF_RAF1_bind: Ras_BRaf + Ras_Raf1 -> Ras_BRaf_Raf1_tetramer; (Kf_BRAF_RAF1_bind*Ras_BRaf*Ras_Raf1 + (-(Kr_BRAF_RAF1_bind*Ras_BRaf_Raf1_tetramer)))*pm;
    BRAF_RAF1_bind_I = 0 pA_um_2; BRAF_RAF1_bind_netValence = 1 _one_;
  BRAF_RAF1_phos: Ras_BRaf_Raf1_tetramer -> Ras_BRaf_pRaf1_tetramer; (Kf_BRAF_RAF1_phos*Ras_BRaf_Raf1_tetramer + (-(Kr_BRAF_RAF1_phos*Ras_BRaf_pRaf1_tetramer)))*pm;
    BRAF_RAF1_phos_I = 0 pA_um_2; BRAF_RAF1_phos_netValence = 1 _one_;
  RAS_pRAF1_unbind: Ras_pRaf1 -> pRaf1 + Ras_GTP; (Kf_RAS_pRAF1_unbind*Ras_pRaf1 + (-(Kr_RAS_pRAF1_unbind*pRaf1*Ras_GTP)))*pm;
    RAS_pRAF1_unbind_I = 0 pA_um_2; RAS_pRAF1_unbind_netValence = 1 _one_;
  RAS_BRAF_bind: BRaf + Ras_GTP -> Ras_BRaf; (Kf_RAS_BRAF_bind*BRaf*Ras_GTP + (-(Kr_RAS_BRAF_bind*Ras_BRaf)))*pm;
    RAS_BRAF_bind_I = 0 pA_um_2; RAS_BRAF_bind_netValence = 1 _one_;
  pRaf1_Raf1_bind: Ras_pRaf1 + Ras_Raf1 -> Ras_pRaf1_Raf1_tetramer; (Kf_pRaf1_Raf1_bind*Ras_pRaf1*Ras_Raf1 + (-(Kr_pRaf1_Raf1_bind*Ras_pRaf1_Raf1_tetramer)))*pm;
    pRaf1_Raf1_bind_I = 0 pA_um_2; pRaf1_Raf1_bind_netValence = 1 _one_;
  pRAF1_RAF1_phos: Ras_pRaf1_Raf1_tetramer -> Ras_pRaf1_tetramer; (Kf_pRAF1_RAF1_phos*Ras_pRaf1_Raf1_tetramer + (-(Kr_pRAF1_RAF1_phos*Ras_pRaf1_tetramer)))*pm;
    pRAF1_RAF1_phos_I = 0 pA_um_2; pRAF1_RAF1_phos_netValence = 1 _one_;
  sorafenib_Raf1_bind_cyt: $sorafenib + Raf1 -> iRaf1; (Kf_sorafenib_Raf1_bind_cyt*sorafenib*Raf1 + (-(Kr_sorafenib_Raf1_bind_cyt*iRaf1)))*cytoplasm;
  Ras_iRaf1_bind: iRaf1 + Ras_GTP -> Ras_iRaf1; (Kf_Ras_iRaf1_bind*iRaf1*Ras_GTP + (-(Kr_Ras_iRaf1_bind*Ras_iRaf1)))*pm;
    Ras_iRaf1_bind_I = 0 pA_um_2; Ras_iRaf1_bind_netValence = 1 _one_;
  iRaf1_iRaf1_bind: 2 Ras_iRaf1 -> Ras_iRaf1_tetramer; (Kf_iRaf1_iRaf1_bind*Ras_iRaf1^2 + (-(Kr_iRaf1_iRaf1_bind*Ras_iRaf1_tetramer)))*pm;
    iRaf1_iRaf1_bind_I = 0 pA_um_2; iRaf1_iRaf1_bind_netValence = 1 _one_;
  BRaf_iRaf1_bind: Ras_BRaf + Ras_iRaf1 -> Ras_Braf_iRaf1_tetramer; (Kf_BRaf_iRaf1_bind*Ras_BRaf*Ras_iRaf1 + (-(Kr_BRaf_iRaf1_bind*Ras_Braf_iRaf1_tetramer)))*pm;
    BRaf_iRaf1_bind_I = 0 pA_um_2; BRaf_iRaf1_bind_netValence = 1 _one_;
  pRAF1_dephos: pRaf1 -> Raf1; (Kf_pRAF1_dephos*pRaf1 + (-(Kr_pRAF1_dephos*Raf1)))*cytoplasm;
  pRaf1_pRaf1_unbind: Ras_pRaf1_tetramer -> 2 Ras_pRaf1; (Kf_pRaf1_pRaf1_unbind*Ras_pRaf1_tetramer + (-(Kr_pRaf1_pRaf1_unbind*Ras_pRaf1^2)))*pm;
    pRaf1_pRaf1_unbind_I = 0 pA_um_2; pRaf1_pRaf1_unbind_netValence = 1 _one_;
  BRaf_pRaf1_unbind: Ras_BRaf_pRaf1_tetramer -> Ras_BRaf + Ras_pRaf1; (Kf_BRaf_pRaf1_unbind*Ras_BRaf_pRaf1_tetramer + (-(Kr_BRaf_pRaf1_unbind*Ras_BRaf*Ras_pRaf1)))*pm;
    BRaf_pRaf1_unbind_I = 0 pA_um_2; BRaf_pRaf1_unbind_netValence = 1 _one_;
  sorafenib_BRaf_bind_cyt: $sorafenib + BRaf -> iBRaf; (Kf_sorafenib_BRaf_bind_cyt*sorafenib*BRaf + (-(Kr_sorafenib_BRaf_bind_cyt*iBRaf)))*cytoplasm;
  MEK_phos: MEK -> pMEK; (Kf_MEK_phos*MEK + (-(Kr_MEK_phos*pMEK)))*cytoplasm;  // modifiers: pRaf1
  MEK_dephos: pMEK -> MEK; (Kf_MEK_dephos*pMEK + (-(Kr_MEK_dephos*MEK)))*cytoplasm;
  ERK_phos: ERK -> pERK; (Kf_ERK_phos*ERK + (-(Kr_ERK_phos*pERK)))*cytoplasm;  // modifiers: pMEK
  ERK_dephos: pERK -> ERK; (Kf_ERK_dephos*pERK + (-(Kr_ERK_dephos*ERK)))*cytoplasm;
  RAS_iBRAF_bind: iBRaf + Ras_GTP -> Ras_iBRaf; (Kf_RAS_iBRAF_bind*iBRaf*Ras_GTP + (-(Kr_RAS_iBRAF_bind*Ras_iBRaf)))*pm;
    RAS_iBRAF_bind_I = 0 pA_um_2; RAS_iBRAF_bind_netValence = 1 _one_;
  iBRaf_dim: 2 Ras_iBRaf -> iBRaf_dimer; (Kf_iBRaf_dim*Ras_iBRaf^2 + (-(Kr_iBRaf_dim*iBRaf_dimer)))*pm;
    iBRaf_dim_I = 0 pA_um_2; iBRaf_dim_netValence = 1 _one_;
  iBRaf_Raf1_bind: Ras_Raf1 + Ras_iBRaf -> Ras_Raf1_iBRaf_tetramer; (Kf_iBRaf_Raf1_bind*Ras_Raf1*Ras_iBRaf + (-(Kr_iBRaf_Raf1_bind*Ras_Raf1_iBRaf_tetramer)))*pm;
    iBRaf_Raf1_bind_I = 0 pA_um_2; iBRaf_Raf1_bind_netValence = 1 _one_;
  Raf1_iBRaf_phos: Ras_Raf1_iBRaf_tetramer -> Ras_pRaf1_iBRaf_tetramer; (Kf_Raf1_iBRaf_phos*Ras_Raf1_iBRaf_tetramer + (-(Kr_Raf1_iBRaf_phos*Ras_pRaf1_iBRaf_tetramer)))*pm;
    Raf1_iBRaf_phos_I = 0 pA_um_2; Raf1_iBRaf_phos_netValence = 1 _one_;
  pRaf1_iBRaf_unbind: Ras_pRaf1_iBRaf_tetramer -> Ras_iBRaf + Ras_pRaf1; (Kf_pRaf1_iBRaf_unbind*Ras_pRaf1_iBRaf_tetramer + (-(Kr_pRaf1_iBRaf_unbind*Ras_iBRaf*Ras_pRaf1)))*pm;
    pRaf1_iBRaf_unbind_I = 0 pA_um_2; pRaf1_iBRaf_unbind_netValence = 1 _one_;
  BRAF_dim: 2 Ras_BRaf -> BRaf_dimer; (Kf_BRAF_dim*Ras_BRaf^2 + (-(Kr_BRAF_dim*BRaf_dimer)))*pm;
    BRAF_dim_I = 0 pA_um_2; BRAF_dim_netValence = 1 _one_;
  Ras_pRaf1_dp: Ras_pRaf1 -> Ras_Raf1; (Kf_Ras_pRaf1_dp*Ras_pRaf1 + (-(Kr_Ras_pRaf1_dp*Ras_Raf1)))*pm;
    Ras_pRaf1_dp_I = 0 pA_um_2; Ras_pRaf1_dp_netValence = 1 _one_;
  Ras_Raf1_nfp: Ras_Raf1 -> Ras_nfpRaf1; (Kf_Ras_Raf1_nfp*Ras_Raf1 + (-(Kr_Ras_Raf1_nfp*Ras_nfpRaf1)))*pm;
    Ras_Raf1_nfp_I = 0 pA_um_2; Ras_Raf1_nfp_netValence = 1 _one_;
  neg_fdbk_unbind_RASt_nfpRAF1: Ras_nfpRaf1 -> Ras_GTP + nfpRaf1; (Kf_neg_fdbk_unbind_RASt_nfpRAF1*Ras_nfpRaf1 + (-(Kr_neg_fdbk_unbind_RASt_nfpRAF1*Ras_GTP*nfpRaf1)))*pm;
    neg_fdbk_unbind_RASt_nfpRAF1_I = 0 pA_um_2; neg_fdbk_unbind_RASt_nfpRAF1_netValence = 1 _one_;
  neg_fdbk_dephos_pRaf1: nfpRaf1 -> Raf1; (Kf_neg_fdbk_dephos_pRaf1*nfpRaf1 + (-(Kr_neg_fdbk_dephos_pRaf1*Raf1)))*cytoplasm;
  BRAF_nfp: Ras_BRaf -> Ras_nfpBRaf; (Kf_BRAF_nfp*Ras_BRaf + (-(Kr_BRAF_nfp*Ras_nfpBRaf)))*pm;
    BRAF_nfp_I = 0 pA_um_2; BRAF_nfp_netValence = 1 _one_;
  neg_fdbk_unbind_RASt_nfpBRAF: Ras_nfpBRaf -> Ras_GTP + nfpBRaf; (Kf_neg_fdbk_unbind_RASt_nfpBRAF*Ras_nfpBRaf + (-(Kr_neg_fdbk_unbind_RASt_nfpBRAF*Ras_GTP*nfpBRaf)))*pm;
    neg_fdbk_unbind_RASt_nfpBRAF_I = 0 pA_um_2; neg_fdbk_unbind_RASt_nfpBRAF_netValence = 1 _one_;
  neg_fdbk_dephos_pBRAF: nfpBRaf -> BRaf; (Kf_neg_fdbk_dephos_pBRAF*nfpBRaf + (-(Kr_neg_fdbk_dephos_pBRAF*BRaf)))*cytoplasm;
  BRaf_iBRaf_dim: Ras_iBRaf + Ras_BRaf -> BRaf_iBRaf_dimer; (Kf_BRaf_iBRaf_dim*Ras_iBRaf*Ras_BRaf + (-(Kr_BRaf_iBRaf_dim*BRaf_iBRaf_dimer)))*pm;
    BRaf_iBRaf_dim_I = 0 pA_um_2; BRaf_iBRaf_dim_netValence = 1 _one_;
  Ras_iRaf_nfp: Ras_iRaf1 -> Ras_nfpiRaf1; (Kf_Ras_iRaf_nfp*Ras_iRaf1 + (-(Kr_Ras_iRaf_nfp*Ras_nfpiRaf1)))*pm;
    Ras_iRaf_nfp_I = 0 pA_um_2; Ras_iRaf_nfp_netValence = 1 _one_;
  neg_fdbk_unbind_piRaf1_RASt: Ras_nfpiRaf1 -> nfpiRaf1 + Ras_GTP; (Kf_neg_fdbk_unbind_piRaf1_RASt*Ras_nfpiRaf1 + (-(Kr_neg_fdbk_unbind_piRaf1_RASt*nfpiRaf1*Ras_GTP)))*pm;
    neg_fdbk_unbind_piRaf1_RASt_I = 0 pA_um_2; neg_fdbk_unbind_piRaf1_RASt_netValence = 1 _one_;
  neg_fdbck_dephos_piRaf: nfpiRaf1 -> iRaf1; (Kf_neg_fdbck_dephos_piRaf*nfpiRaf1 + (-(Kr_neg_fdbck_dephos_piRaf*iRaf1)))*cytoplasm;
  Ras_iBRaf_nfp: Ras_iBRaf -> Ras_nfpiBRaf; (Kf_Ras_iBRaf_nfp*Ras_iBRaf + (-(Kr_Ras_iBRaf_nfp*Ras_nfpiBRaf)))*pm;
    Ras_iBRaf_nfp_I = 0 pA_um_2; Ras_iBRaf_nfp_netValence = 1 _one_;
  neg_fdbk_unbind_piBRaf_RASt: Ras_nfpiBRaf -> nfpiBRaf + Ras_GTP; (Kf_neg_fdbk_unbind_piBRaf_RASt*Ras_nfpiBRaf + (-(Kr_neg_fdbk_unbind_piBRaf_RASt*nfpiBRaf*Ras_GTP)))*pm;
    neg_fdbk_unbind_piBRaf_RASt_I = 0 pA_um_2; neg_fdbk_unbind_piBRaf_RASt_netValence = 1 _one_;
  neg_fdbk_dephos_iBRAF: nfpiBRaf -> iBRaf; (Kf_neg_fdbk_dephos_iBRAF*nfpiBRaf + (-(Kr_neg_fdbk_dephos_iBRAF*iBRaf)))*cytoplasm;
  iRaf_iBRaf_dim: Ras_iBRaf + Ras_iRaf1 -> Ras_iRaf1_iBRaf1_tetramer; (Kf_iRaf_iBRaf_dim*Ras_iBRaf*Ras_iRaf1 + (-(Kr_iRaf_iBRaf_dim*Ras_iRaf1_iBRaf1_tetramer)))*pm;
    iRaf_iBRaf_dim_I = 0 pA_um_2; iRaf_iBRaf_dim_netValence = 1 _one_;
  EGF_bind: mE -> mEL; (Kf_EGF_bind*mE + (-(Kr_EGF_bind*mEL)))*pm;
    EGF_bind_I = 0 pA_um_2; EGF_bind_netValence = 1 _one_;
  mEL_dim: 2 mEL -> mELmEL; (Kf_mEL_dim*mEL^2 + (-(Kr_mEL_dim*mELmEL)))*pm;
    mEL_dim_I = 0 pA_um_2; mEL_dim_netValence = 1 _one_;
  mELmEL_phos_dephos: mELmEL -> E; (Kf_mELmEL_phos_dephos*mELmEL + (-(Kr_mELmEL_phos_dephos*E)))*pm;
    mELmEL_phos_dephos_I = 0 pA_um_2; mELmEL_phos_dephos_netValence = 1 _one_;
  RAS_GTP_bind: Ras_GDP -> Ras_GTP; (Kf_RAS_GTP_bind*Ras_GDP + (-(Kr_RAS_GTP_bind*Ras_GTP)))*pm;  // modifiers: EG2SOS
    RAS_GTP_bind_I = 0 pA_um_2; RAS_GTP_bind_netValence = 1 _one_;
  RAS_GTPhydro: Ras_GTP -> Ras_GDP; (Kf_RAS_GTPhydro*Ras_GTP + (-(Kr_RAS_GTPhydro*Ras_GDP)))*pm;
    RAS_GTPhydro_I = 0 pA_um_2; RAS_GTPhydro_netValence = 1 _one_;
  E_G2SOS_bind: GRB2_SOS + E -> EG2SOS; (Kf_E_G2SOS_bind*GRB2_SOS*E + (-(Kr_E_G2SOS_bind*EG2SOS)))*pm;
    E_G2SOS_bind_I = 0 pA_um_2; E_G2SOS_bind_netValence = 1 _one_;
  E_G2_bind: GRB2 + E -> EG2; (Kf_E_G2_bind*GRB2*E + (-(Kr_E_G2_bind*EG2)))*pm;
    E_G2_bind_I = 0 pA_um_2; E_G2_bind_netValence = 1 _one_;
  GRB2_SOS_bind_cyt: GRB2 + SOS -> GRB2_SOS; (Kf_GRB2_SOS_bind_cyt*GRB2*SOS + (-(Kr_GRB2_SOS_bind_cyt*GRB2_SOS)))*cytoplasm;
  EG2_SOS_bind: EG2 + SOS -> EG2SOS; (Kf_EG2_SOS_bind*EG2*SOS + (-(Kr_EG2_SOS_bind*EG2SOS)))*pm;
    EG2_SOS_bind_I = 0 pA_um_2; EG2_SOS_bind_netValence = 1 _one_;
  neg_fdbk_dephos_pSOS: nfpSOS -> SOS; (Kf_neg_fdbk_dephos_pSOS*nfpSOS + (-(Kr_neg_fdbk_dephos_pSOS*SOS)))*cytoplasm;
  neg_fdbk_phos_of_SOS: EG2SOS -> EG2 + nfpSOS; (Kf_neg_fdbk_phos_of_SOS*EG2SOS + (-(Kr_neg_fdbk_phos_of_SOS*EG2*nfpSOS)))*pm;  // modifiers: pERK
    neg_fdbk_phos_of_SOS_I = 0 pA_um_2; neg_fdbk_phos_of_SOS_netValence = 1 _one_;

  // Unit definitions:
  unit molecules = item;
  unit um3 = (1e-6 metre)^3;
  unit um2 = (1e-6 metre)^2;
  unit um = 1e-6 metre;
  unit min = 60 second;
  unit uM_1_min_1 = litre / (1e-6 mole * 60 second);
  unit min_1 = 1 / (60 second);
  unit molecules_1_min_1 = 1 / (item * 60 second);
  unit min_1_molecules_1 = 1 / (60 second * item);
  unit uM = 1e-6 mole / litre;
  unit K = kelvin;
  unit _one_ = dimensionless;
  unit C_mol_1 = coulomb / mole;
  unit C_nmol_1 = coulomb / (1e-9 mole);
  unit molecules_pmol_1 = item / (1e-12 mole);
  unit _one_000000000 = 1e9 dimensionless;
  unit mV_C_K_1_mol_1 = 1e-3 volt * coulomb / (kelvin * mole);
  unit mV_V_1 = dimensionless;
  unit uM_um3_molecules_1 = 1e-6 mole * (1e-6 metre)^3 / (litre * item);
  unit pA_um_2 = 1e-12 ampere / (1e-6 metre)^2;
  unit um3_min_1_molecules_1 = (1e-6 metre)^3 / (60 second * item);
  unit um2_min_1_molecules_1 = (1e-6 metre)^2 / (60 second * item);
end
